OpenVSP model (file version 5), 1 components.
Geometry view with OpenVSP parameter names; values to 6 digits, angles in degrees, lengths in the model's unit.
Overall bounding box: X_Min=-0.15 X_Len=0.3 Y_Min=3 Y_Len=12 Z_Min=-0.75 Z_Len=1.5

Propeller "propeller"
  location (X Y Z) 0 0 0, rotation 0 0 0
  bounding box size 0.3 12 1.5
  Design: Diameter=30 NumBlade=1 Beta34=0 UseBeta34Flag=0 Feather=0 Rotate=0 Precone=0 ReverseFlag=0 FoldAngle=0 PropMode=0 AF=78 CLi=0.538798 Chord=0.1 Solidity=0.031831 ConstructXoC=0.5 FeatherAxisXoC=0.5 FeatherOffsetXoC=0
  cross sections:
    n  RadiusFrac  shape
    0  0.2         biconvex Chord=1.5 ThickChord=0.2
    1  1           as above
  Chord along r/R (linear): 0.2: 0.1, 1: 0.1
  Thick along r/R (linear): 0.2: 0.2, 1: 0.2
  CLI along r/R (cubic Bezier): 0.2: 0, 0.266667: 0.7, 0.333333: 0.7, 0.4: 0.7, 0.466667: 0.7, 0.533333: 0.7, 0.6: 0.7, 0.733333: 0.7, 0.866667: 0.7, 1: 0.2
