OpenVSP model (file version 5), 1 components.
Geometry view with OpenVSP parameter names; values to 6 digits, angles in degrees, lengths in the model's unit.
Overall bounding box: X_Min=-0.00672692 X_Len=0.0175153 Y_Min=-0.129301 Y_Len=0.3833 Z_Min=-0.220778 Z_Len=0.440433

Propeller "propeller"
  location (X Y Z) 0 0 0, rotation 0 0 0
  bounding box size 0.0175153 0.3833 0.440433
  Design: Diameter=0.508 NumBlade=3 Beta34=8.33415 UseBeta34Flag=0 Feather=0 Rotate=0 Precone=0 ReverseFlag=0 FoldAngle=0 PropMode=0 AF=43.8243 CLi=0.538798 Chord=0.0725039 Solidity=0.0692362 ConstructXoC=0 FeatherAxisXoC=0 FeatherOffsetXoC=0
  cross sections:
    n   RadiusFrac  shape
    0   0.2         airfoil file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 BaseThickChord=0.198957 Chord=0.0328311 ThickChord=0.198957
    1   0.205455    airfoil file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 BaseThickChord=0.198279 Chord=0.0323216 ThickChord=0.198279
    2   0.221673    airfoil file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 BaseThickChord=0.196264 Chord=0.0308651 ThickChord=0.196264
    3   0.24821     airfoil file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 BaseThickChord=0.192969 Chord=0.0286703 ThickChord=0.192969
    4   0.284344    airfoil file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 BaseThickChord=0.188485 Chord=0.0261241 ThickChord=0.188485
    5   0.329087    airfoil file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 BaseThickChord=0.18294 Chord=0.023552 ThickChord=0.18294
    6   0.381221    airfoil file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 BaseThickChord=0.176497 Chord=0.0213375 ThickChord=0.176497
    7   0.439322    airfoil file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 BaseThickChord=0.169355 Chord=0.0195878 ThickChord=0.169355
    8   0.501806    airfoil file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 BaseThickChord=0.161727 Chord=0.0183258 ThickChord=0.161727
    9   0.566968    airfoil file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 BaseThickChord=0.15384 Chord=0.0175087 ThickChord=0.15384
    10  0.633032    airfoil file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 BaseThickChord=0.145934 Chord=0.0170418 ThickChord=0.145934
    11  0.698194    airfoil file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 BaseThickChord=0.13822 Chord=0.0167682 ThickChord=0.13822
    12  0.760678    airfoil file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 BaseThickChord=0.130113 Chord=0.0164999 ThickChord=0.130113
    13  0.818779    airfoil file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 BaseThickChord=0.122723 Chord=0.0159704 ThickChord=0.122723
    14  0.870913    airfoil file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 BaseThickChord=0.11619 Chord=0.0149221 ThickChord=0.11619
    15  0.915656    airfoil file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 BaseThickChord=0.11062 Chord=0.0131469 ThickChord=0.11062
    16  0.95179     airfoil file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 BaseThickChord=0.106127 Chord=0.0106105 ThickChord=0.106127
    17  0.978327    airfoil file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 BaseThickChord=0.102826 Chord=0.00743587 ThickChord=0.102826
    18  0.994545    airfoil file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 BaseThickChord=0.100806 Chord=0.00382349 ThickChord=0.100806
    19  1           airfoil file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 BaseThickChord=0.100126 Chord=0.001 ThickChord=0.100126
  Chord along r/R (PCHIP): 0.2: 0.129256, 0.205455: 0.12725, 0.221673: 0.121516, 0.24821: 0.112875, 0.284344: 0.102851, 0.329087: 0.0927242, 0.381221: 0.0840058, 0.439322: 0.0771175, 0.501806: 0.072149, 0.566968: 0.0689319, 0.633032: 0.0670938, 0.698194: 0.0660165, 0.760678: 0.0649603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
  Twist along r/R (PCHIP): 0.2: 28.7812, 0.205455: 28.1353, 0.221673: 26.3639, 0.24821: 23.8757, 0.284344: 21.1257, 0.329087: 18.4616, 0.381221: 16.0767, 0.439322: 14.0406, 0.501806: 12.3495, 0.566968: 10.9667, 0.633032: 9.84587, 0.698194: 8.94255, 0.760678: 8.21846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
  Sweep along r/R (PCHIP): 0.2: 0, 0.205455: 0.00313532, 0.221673: 0.0207295, 0.24821: 0.0455444, 0.284344: 0.0731551, 0.329087: 0.100205, 0.381221: 0.124851, 0.439322: 0.146441, 0.501806: 0.164971, 0.566968: 0.180717, 0.633032: 0.194019, 0.698194: 0.205193, 0.760678: 0.214508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
  Thick along r/R (PCHIP): 0.2: 0.198957, 0.205455: 0.198279, 0.221673: 0.196264, 0.24821: 0.192969, 0.284344: 0.188485, 0.329087: 0.18294, 0.381221: 0.176497, 0.439322: 0.169355, 0.501806: 0.161727, 0.566968: 0.15384, 0.633032: 0.145934, 0.698194: 0.13822, 0.760678: 0.130113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
  CLI along r/R (cubic Bezier): 0.2: 0, 0.266667: 0.7, 0.333333: 0.7, 0.4: 0.7, 0.466667: 0.7, 0.533333: 0.7, 0.6: 0.7, 0.733333: 0.7, 0.866667: 0.7, 1: 0.2
  Axial along r/R (PCHIP): 0.2: -0.0197585, 0.205455: -0.0189489, 0.221673: -0.0168447, 0.24821: -0.0140589, 0.284344: -0.0113112, 0.329087: -0.00905595, 0.381221: -0.00749911, 0.439322: -0.00658363, 0.501806: -0.00618141, 0.566968: -0.00615698, 0.633032: -0.00639165, 0.698194: -0.00678389, 0.760678: -0.00725036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
  Tangential along r/R (PCHIP): 0.2: -0.047184, 0.205455: -0.0466682, 0.221673: -0.0451049, 0.24821: -0.0425407, 0.284344: -0.0393405, 0.329087: -0.0359203, 0.381221: -0.0328901, 0.439322: -0.030476, 0.501806: -0.0287679, 0.566968: -0.0277366, 0.633032: -0.0272533, 0.698194: -0.0270713, 0.760678: -0.0268755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
